Tue 03/12/2019
10:25 AM
$PROB  wexample10 (from F_FLAG04est2a.ctl)
$INPUT C ID DOSE=AMT TIME DV WT TYPE
$DATA wexample10.csv IGNORE=@

$SUBROUTINES  ADVAN2 TRANS2

$PK
   MU_1=THETA(1)
   KA=EXP(MU_1+ETA(1))
   MU_2=THETA(2)
   V=EXP(MU_2+ETA(2))
   MU_3=THETA(3)
   CL=EXP(MU_3+ETA(3))
   S2=V/1000

$THETA
1.6 ; [LN(KA)]
2.3 ; [LN(V)]
0.7 ; [LN(CL)]
0.1 ; [INTRCEPT]
0.1 ; [SLOPE]

$OMEGA BLOCK(3) VALUES(0.5,0.01) ;[P]
; Priors to Omegas
$PRIOR NWPRI
$OMEGAP BLOCK(3) FIXED VALUES(0.09,0.0)
$OMEGAPD (3 FIX)

;Because THETA(4) and THETA(5) have no inter-subject variability associated with them, the
; algorithm must use a more computationally expensive gradient evaluation for these two parameters

$SIGMA
0.1; [P]

$ERROR
IPRED=A(2)/S2
    EXPP=THETA(4)+IPRED*THETA(5)
; Put a limit on this, as it will be exponentiated, to avoid floating overflow
    IF(EXPP.GT.40.0) EXPP=40.0
IF (TYPE.EQ.0) THEN
; PK Data
    F_FLAG=0
    Y=IPRED+IPRED*ERR(1) ; a prediction
 ELSE
; Categorical data
    F_FLAG=1
; IF EXPP>40, then A>1.0d+17, A/B=1, and Y=DV
    AA=EXP(EXPP)
    B=1+AA
    Y=DV*AA/B+(1-DV)/B      ; a likelihood
 ENDIF

; NOPRIOR=1 can turn off incorporation of prior information for a particular method,
; and turned back on (NOPRIOR=0) for others.  Prior information is not needed for ITS, but is needed for BAYES
; Raw output content can be routed to specific files for each $EST record, with the FILE= option
$EST METHOD=ITS INTER LAP AUTO=1 PRINT=5 SIGL=6 NOPRIOR=1 FILE=wexample10_its.ext
$EST METHOD=BAYES AUTO=1 NOPRIOR=0 PRINT=100
     FILE=wexample10_bayes.ext

$COV UNCONDITIONAL PRINT=E MATRIX=R SIGL=10
$TABLE ID DOSE WT TIME TYPE DV AA NOPRINT FILE=wexample10_bayes.tab

NM-TRAN MESSAGES
 WARNINGS AND ERRORS (IF ANY) FOR PROBLEM    1
 (WARNING  2) NM-TRAN INFERS THAT THE DATA ARE POPULATION.
 (WARNING  3) THERE MAY BE AN ERROR IN THE ABBREVIATED CODE. THE FOLLOWING
 ONE OR MORE RANDOM VARIABLES ARE DEFINED WITH "IF" STATEMENTS THAT DO NOT
 PROVIDE DEFINITIONS FOR BOTH THE "THEN" AND "ELSE" CASES. IF ALL
 CONDITIONS FAIL, THE VALUES OF THESE VARIABLES WILL BE ZERO.
   AA B
 (WARNING  87) WITH "LAPLACIAN" AND "INTERACTION", "NUMERICAL" AND "SLOW"
 ARE ALSO REQUIRED ON $ESTIM RECORD, AND "SLOW" IS REQUIRED ON $COV
 RECORD. NM-TRAN HAS SUPPLIED THESE OPTIONS.
 (WARNING  87) WITH "LAPLACIAN" AND "INTERACTION", "NUMERICAL" AND "SLOW"
 ARE ALSO REQUIRED ON $ESTIM RECORD, AND "SLOW" IS REQUIRED ON $COV
 RECORD. NM-TRAN HAS SUPPLIED THESE OPTIONS.

1NONLINEAR MIXED EFFECTS MODEL PROGRAM (NONMEM) VERSION 7.4.3
 ORIGINALLY DEVELOPED BY STUART BEAL, LEWIS SHEINER, AND ALISON BOECKMANN
 CURRENT DEVELOPERS ARE ROBERT BAUER, ICON DEVELOPMENT SOLUTIONS,
 AND ALISON BOECKMANN. IMPLEMENTATION, EFFICIENCY, AND STANDARDIZATION
 PERFORMED BY NOUS INFOSYSTEMS.
 PROBLEM NO.:         1
 wexample10 (from F_FLAG04est2a.ctl)
 TOT. NO. OF OBS RECS:     4320
 TOT. NO. OF INDIVIDUALS:      288
 ONE COMPARTMENT MODEL WITH FIRST-ORDER ABSORPTION (ADVAN2)
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 #TBLN:      1
 #METH: Iterative Two Stage (No Prior)
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
 #TERM:
 OPTIMIZATION WAS COMPLETED

 ETABAR IS THE ARITHMETIC MEAN OF THE ETA-ESTIMATES,
 AND THE P-VALUE IS GIVEN FOR THE NULL HYPOTHESIS THAT THE TRUE MEAN IS 0.

 ETABAR:        -3.4376E-08 -5.0083E-09 -1.2078E-09
 SE:             1.4404E-02  1.5600E-02  1.6953E-02
 N:                     288         288         288

 P VAL.:         1.0000E+00  1.0000E+00  1.0000E+00

 ETASHRINKSD(%)  1.6449E+01  2.8186E+00  1.6152E+00
 ETASHRINKVR(%)  3.0192E+01  5.5577E+00  3.2044E+00
 EBVSHRINKSD(%)  1.6449E+01  2.8186E+00  1.6152E+00
 EBVSHRINKVR(%)  3.0192E+01  5.5577E+00  3.2044E+00
 EPSSHRINKSD(%)  1.2870E+01
 EPSSHRINKVR(%)  2.4084E+01


 TOTAL DATA POINTS NORMALLY DISTRIBUTED (N):         2880
 N*LOG(2PI) CONSTANT TO OBJECTIVE FUNCTION:    5293.08595125891
 OBJECTIVE FUNCTION VALUE WITHOUT CONSTANT:    10043.2087212924
 OBJECTIVE FUNCTION VALUE WITH CONSTANT:       15336.2946725513
 REPORTED OBJECTIVE FUNCTION DOES NOT CONTAIN CONSTANT

 TOTAL EFFECTIVE ETAS (NIND*NETA):                           864


 #TERE:
 Elapsed estimation  time in seconds:     7.51
 Elapsed covariance  time in seconds:     0.39

 ********************                          ITERATIVE TWO STAGE (NO PRIOR)                        ********************
 #OBJT:**************                        FINAL VALUE OF OBJECTIVE FUNCTION                       ********************
 #OBJV:********************************************    10043.209       **************************************************

 ********************                          ITERATIVE TWO STAGE (NO PRIOR)                        ********************
 ********************                             FINAL PARAMETER ESTIMATE                           ********************

 THETA - VECTOR OF FIXED EFFECTS PARAMETERS   *********
         TH 1      TH 2      TH 3      TH 4      TH 5
         1.07E+00  3.39E+00  2.44E+00 -6.48E-01  8.06E-02

 OMEGA - COV MATRIX FOR RANDOM EFFECTS - ETAS  ********
         ETA1      ETA2      ETA3
 ETA1
+        8.59E-02
 ETA2
+        3.65E-03  7.45E-02
 ETA3
+        3.60E-02  3.00E-02  8.58E-02

 SIGMA - COV MATRIX FOR RANDOM EFFECTS - EPSILONS  ****
         EPS1
 EPS1
+        2.27E-02

 OMEGA - CORR MATRIX FOR RANDOM EFFECTS - ETAS  *******
         ETA1      ETA2      ETA3
 ETA1
+        2.93E-01
 ETA2
+        4.56E-02  2.73E-01
 ETA3
+        4.19E-01  3.75E-01  2.93E-01

 SIGMA - CORR MATRIX FOR RANDOM EFFECTS - EPSILONS  ***
         EPS1
 EPS1
+        1.51E-01

 ********************                          ITERATIVE TWO STAGE (NO PRIOR)                        ********************
 ********************                          STANDARD ERROR OF ESTIMATE (S)                        ********************

 THETA - VECTOR OF FIXED EFFECTS PARAMETERS   *********
         TH 1      TH 2      TH 3      TH 4      TH 5
         2.29E-02  1.67E-02  1.76E-02  9.97E-02  7.19E-03

 OMEGA - COV MATRIX FOR RANDOM EFFECTS - ETAS  ********
         ETA1      ETA2      ETA3
 ETA1
+        9.97E-03
 ETA2
+        6.30E-03  6.41E-03
 ETA3
+        7.19E-03  5.17E-03  7.29E-03

 SIGMA - COV MATRIX FOR RANDOM EFFECTS - EPSILONS  ****
         EPS1
 EPS1
+        7.78E-04

 OMEGA - CORR MATRIX FOR RANDOM EFFECTS - ETAS  *******
         ETA1      ETA2      ETA3
 ETA1
+        1.70E-02
 ETA2
+        7.81E-02  1.17E-02
 ETA3
+        6.10E-02  5.31E-02  1.24E-02

 SIGMA - CORR MATRIX FOR RANDOM EFFECTS - EPSILONS  ***
         EPS1
 EPS1
+        2.58E-03

 ********************                          ITERATIVE TWO STAGE (NO PRIOR)                        ********************
 ********************                        COVARIANCE MATRIX OF ESTIMATE (S)                       ********************

            TH 1      TH 2      TH 3      TH 4      TH 5      OM11      OM12      OM13      OM22      OM23      OM33      SG11
 TH 1
+        5.26E-04
 TH 2
+        3.37E-05  2.79E-04
 TH 3
+        1.35E-04  1.19E-04  3.11E-04
 TH 4
+       -2.76E-05 -9.00E-05 -9.68E-05  9.94E-03
 TH 5
+        7.78E-06  6.39E-06  5.64E-06 -4.92E-04  5.17E-05
 OM11
+        7.32E-05  3.29E-06 -1.95E-06  6.66E-05 -2.51E-06  9.94E-05
 OM12
+        1.38E-05  5.85E-06  6.41E-06 -9.14E-05  4.18E-06  1.18E-05  3.97E-05
 OM13
+        2.21E-05  4.62E-06  1.94E-06 -2.00E-05  7.48E-07  5.52E-05  1.80E-05  5.17E-05
 OM22
+        8.30E-06 -2.27E-06  1.23E-06  3.14E-06  1.75E-06  6.14E-06  4.22E-06  5.04E-06  4.11E-05
 OM23
+        5.44E-06  1.45E-06  2.20E-06 -3.02E-05  3.42E-06  5.11E-06  1.49E-05  9.55E-06  1.49E-05  2.68E-05
 OM33
+        2.55E-06  3.29E-06  4.45E-06 -5.95E-05  1.44E-06  6.35E-06  1.21E-05  2.00E-05  3.80E-06  1.80E-05  5.31E-05
 SG11
+        2.42E-07  1.00E-06  2.51E-07  9.46E-07  2.87E-07 -5.20E-08 -2.84E-07  1.63E-07 -6.56E-07 -6.68E-07  3.15E-07  6.05E-07

 ********************                          ITERATIVE TWO STAGE (NO PRIOR)                        ********************
 ********************                        CORRELATION MATRIX OF ESTIMATE (S)                      ********************

            TH 1      TH 2      TH 3      TH 4      TH 5      OM11      OM12      OM13      OM22      OM23      OM33      SG11
 TH 1
+        2.29E-02
 TH 2
+        8.79E-02  1.67E-02
 TH 3
+        3.34E-01  4.03E-01  1.76E-02
 TH 4
+       -1.21E-02 -5.41E-02 -5.50E-02  9.97E-02
 TH 5
+        4.72E-02  5.32E-02  4.44E-02 -6.86E-01  7.19E-03
 OM11
+        3.20E-01  1.97E-02 -1.11E-02  6.70E-02 -3.50E-02  9.97E-03
 OM12
+        9.53E-02  5.56E-02  5.76E-02 -1.46E-01  9.22E-02  1.87E-01  6.30E-03
 OM13
+        1.34E-01  3.85E-02  1.53E-02 -2.78E-02  1.45E-02  7.70E-01  3.97E-01  7.19E-03
 OM22
+        5.64E-02 -2.12E-02  1.09E-02  4.91E-03  3.79E-02  9.60E-02  1.05E-01  1.09E-01  6.41E-03
 OM23
+        4.59E-02  1.67E-02  2.40E-02 -5.86E-02  9.18E-02  9.90E-02  4.57E-01  2.57E-01  4.50E-01  5.17E-03
 OM33
+        1.53E-02  2.70E-02  3.46E-02 -8.19E-02  2.75E-02  8.75E-02  2.64E-01  3.82E-01  8.12E-02  4.78E-01  7.29E-03
 SG11
+        1.36E-02  7.73E-02  1.83E-02  1.22E-02  5.12E-02 -6.70E-03 -5.79E-02  2.91E-02 -1.31E-01 -1.66E-01  5.55E-02  7.78E-04
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
 ********************                          ITERATIVE TWO STAGE (NO PRIOR)                        ********************
 ********************                    EIGENVALUES OF COR MATRIX OF ESTIMATE (S)                   ********************

             1         2         3         4         5         6         7         8         9        10        11        12
         1.33E-01  2.74E-01  3.50E-01  5.03E-01  6.95E-01  8.08E-01  8.82E-01  1.11E+00  1.33E+00  1.59E+00  1.75E+00  2.57E+00
 #TBLN:      2
 #METH: MCMC Bayesian Analysis
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
 #TERM:
 BURN-IN WAS COMPLETED
 STATISTICAL PORTION WAS COMPLETED

 TOTAL DATA POINTS NORMALLY DISTRIBUTED (N):         2880
 N*LOG(2PI) CONSTANT TO OBJECTIVE FUNCTION:    5293.08595125891
 OBJECTIVE FUNCTION VALUE WITHOUT CONSTANT:    5800.60572178871
 OBJECTIVE FUNCTION VALUE WITH CONSTANT:       11093.6916730476
 REPORTED OBJECTIVE FUNCTION DOES NOT CONTAIN CONSTANT

 TOTAL EFFECTIVE ETAS (NIND*NETA):                           864
 NIND*NETA*LOG(2PI) CONSTANT TO OBJECTIVE FUNCTION:    1587.92578537767
 OBJECTIVE FUNCTION VALUE WITHOUT CONSTANT:    5800.60572178871
 OBJECTIVE FUNCTION VALUE WITH CONSTANT:       7388.53150716639
 REPORTED OBJECTIVE FUNCTION DOES NOT CONTAIN CONSTANT

 PRIOR CONSTANT TO OBJECTIVE FUNCTION:    22.3596795730206
 OBJECTIVE FUNCTION VALUE WITHOUT CONSTANT:    5800.60572178871
 OBJECTIVE FUNCTION VALUE WITH CONSTANT:       5822.96540136173
 REPORTED OBJECTIVE FUNCTION DOES NOT CONTAIN CONSTANT


 #TERE:
 Elapsed estimation  time in seconds:   701.37
 Elapsed covariance  time in seconds:     0.00

 ********************                              MCMC BAYESIAN ANALYSIS                            ********************
 #OBJT:**************                       AVERAGE VALUE OF LIKELIHOOD FUNCTION                     ********************
 #OBJV:********************************************     5800.606       **************************************************
 #OBJS:********************************************       49.898 (STD) **************************************************

 ********************                              MCMC BAYESIAN ANALYSIS                            ********************
 ********************                             FINAL PARAMETER ESTIMATE                           ********************

 THETA - VECTOR OF FIXED EFFECTS PARAMETERS   *********
         TH 1      TH 2      TH 3      TH 4      TH 5
         1.12E+00  3.39E+00  2.44E+00 -6.54E-01  8.13E-02

 OMEGA - COV MATRIX FOR RANDOM EFFECTS - ETAS  ********
         ETA1      ETA2      ETA3
 ETA1
+        9.45E-02
 ETA2
+        4.12E-03  7.60E-02
 ETA3
+        3.78E-02  2.96E-02  8.68E-02

 SIGMA - COV MATRIX FOR RANDOM EFFECTS - EPSILONS  ****
         EPS1
 EPS1
+        2.28E-02

 OMEGA - CORR MATRIX FOR RANDOM EFFECTS - ETAS  *******
         ETA1      ETA2      ETA3
 ETA1
+        3.07E-01
 ETA2
+        4.82E-02  2.75E-01
 ETA3
+        4.17E-01  3.64E-01  2.94E-01

 SIGMA - CORR MATRIX FOR RANDOM EFFECTS - EPSILONS  ***
         EPS1
 EPS1
+        1.51E-01

 ********************                              MCMC BAYESIAN ANALYSIS                            ********************
 ********************                STANDARD ERROR OF ESTIMATE (From Sample Variance)               ********************

 THETA - VECTOR OF FIXED EFFECTS PARAMETERS   *********
         TH 1      TH 2      TH 3      TH 4      TH 5
         2.23E-02  1.67E-02  1.76E-02  9.52E-02  6.17E-03

 OMEGA - COV MATRIX FOR RANDOM EFFECTS - ETAS  ********
         ETA1      ETA2      ETA3
 ETA1
+        1.21E-02
 ETA2
+        6.29E-03  6.80E-03
 ETA3
+        7.17E-03  5.39E-03  7.54E-03

 SIGMA - COV MATRIX FOR RANDOM EFFECTS - EPSILONS  ****
         EPS1
 EPS1
+        7.24E-04

 OMEGA - CORR MATRIX FOR RANDOM EFFECTS - ETAS  *******
         ETA1      ETA2      ETA3
 ETA1
+        1.96E-02
 ETA2
+        7.34E-02  1.23E-02
 ETA3
+        6.22E-02  5.30E-02  1.27E-02

 SIGMA - CORR MATRIX FOR RANDOM EFFECTS - EPSILONS  ***
         EPS1
 EPS1
+        2.40E-03

 ********************                              MCMC BAYESIAN ANALYSIS                            ********************
 ********************               COVARIANCE MATRIX OF ESTIMATE (From Sample Variance)             ********************

            TH 1      TH 2      TH 3      TH 4      TH 5      OM11      OM12      OM13      OM22      OM23      OM33      SG11
 TH 1
+        4.96E-04
 TH 2
+        3.13E-05  2.80E-04
 TH 3
+        1.38E-04  1.17E-04  3.09E-04
 TH 4
+       -1.58E-06  2.73E-05  1.25E-05  9.06E-03
 TH 5
+        1.64E-06  9.20E-08  1.72E-07 -3.62E-04  3.81E-05
 OM11
+        3.93E-05  1.23E-07 -4.85E-07  2.40E-06 -1.68E-07  1.47E-04
 OM12
+        4.51E-06 -3.33E-07  1.88E-06 -2.29E-06 -1.58E-07  9.03E-06  3.95E-05
 OM13
+        6.71E-06 -1.79E-07  1.33E-06  1.07E-05 -4.73E-07  4.45E-05  1.82E-05  5.15E-05
 OM22
+        1.58E-06  5.83E-07 -9.90E-07 -4.90E-06  2.84E-07  2.29E-06  5.11E-06  2.72E-06  4.62E-05
 OM23
+       -1.26E-06 -1.49E-06 -5.90E-07 -5.80E-06  2.75E-07  3.66E-06  1.20E-05  7.69E-06  1.89E-05  2.91E-05
 OM33
+       -2.19E-06  3.05E-07  2.27E-06 -2.94E-06  4.44E-07  1.23E-05  9.72E-06  2.59E-05  8.31E-06  2.07E-05  5.68E-05
 SG11
+        1.14E-07  3.38E-07  2.29E-07  1.06E-06 -2.52E-08 -7.68E-07 -7.06E-08 -2.44E-08 -2.63E-08 -6.42E-08 -4.77E-08  5.24E-07

 ********************                              MCMC BAYESIAN ANALYSIS                            ********************
 ********************              CORRELATION MATRIX OF ESTIMATE (From Sample Variance)             ********************

            TH 1      TH 2      TH 3      TH 4      TH 5      OM11      OM12      OM13      OM22      OM23      OM33      SG11
 TH 1
+        2.23E-02
 TH 2
+        8.42E-02  1.67E-02
 TH 3
+        3.53E-01  3.99E-01  1.76E-02
 TH 4
+       -7.43E-04  1.72E-02  7.50E-03  9.52E-02
 TH 5
+        1.19E-02  8.91E-04  1.58E-03 -6.16E-01  6.17E-03
 OM11
+        1.46E-01  6.09E-04 -2.28E-03  2.08E-03 -2.25E-03  1.21E-02
 OM12
+        3.22E-02 -3.16E-03  1.70E-02 -3.83E-03 -4.08E-03  1.18E-01  6.29E-03
 OM13
+        4.20E-02 -1.49E-03  1.06E-02  1.57E-02 -1.07E-02  5.11E-01  4.04E-01  7.17E-03
 OM22
+        1.04E-02  5.13E-03 -8.29E-03 -7.57E-03  6.77E-03  2.78E-02  1.20E-01  5.58E-02  6.80E-03
 OM23
+       -1.05E-02 -1.66E-02 -6.22E-03 -1.13E-02  8.25E-03  5.60E-02  3.53E-01  1.99E-01  5.14E-01  5.39E-03
 OM33
+       -1.30E-02  2.42E-03  1.71E-02 -4.10E-03  9.55E-03  1.35E-01  2.05E-01  4.79E-01  1.62E-01  5.09E-01  7.54E-03
 SG11
+        7.05E-03  2.79E-02  1.80E-02  1.54E-02 -5.64E-03 -8.74E-02 -1.55E-02 -4.70E-03 -5.34E-03 -1.64E-02 -8.74E-03  7.24E-04
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
 ********************                              MCMC BAYESIAN ANALYSIS                            ********************
 ********************           EIGENVALUES OF COR MATRIX OF ESTIMATE (From Sample Variance)         ********************

             1         2         3         4         5         6         7         8         9        10        11        12
         2.39E-01  3.83E-01  4.13E-01  4.98E-01  7.70E-01  8.30E-01  9.31E-01  1.01E+00  1.36E+00  1.59E+00  1.62E+00  2.36E+00
 Elapsed postprocess time in seconds:     0.15
 Elapsed finaloutput time in seconds:     0.54
 #CPUT: Total CPU Time in Seconds,      696.685
