Tue 03/12/2019
10:18 AM
$PROB  wexample10 (from F_FLAG04est2a.ctl)
$INPUT C ID DOSE=AMT TIME DV WT TYPE
$DATA wexample10.csv IGNORE=@

$SUBROUTINES  ADVAN2 TRANS2

$PK
   MU_1=THETA(1)
   KA=EXP(MU_1+ETA(1))
   MU_2=THETA(2)
   V=EXP(MU_2+ETA(2))
   MU_3=THETA(3)
   CL=EXP(MU_3+ETA(3))
   S2=V/1000

$THETA
1.6 ; [LN(KA)]
2.3 ; [LN(V)]
0.7 ; [LN(CL)]
0.1 ; [INTRCEPT]
0.1 ; [SLOPE]

$OMEGA BLOCK(3) VALUES(0.3,0.01) ; [P]

;Because THETA(4) and THETA(5) have no inter-subject variability associated with them, the
; algorithm must use a more computationally expensive gradient evaluation for these two parameters

$SIGMA
0.1; [P]

$ERROR
    IPRED=A(2)/S2
    EXPP=THETA(4)+IPRED*THETA(5)
; Put a limit on this, as it will be exponentiated, to avoid floating overflow
    IF(EXPP.GT.40.0) EXPP=40.0
IF (TYPE.EQ.0) THEN
; PK Data
    F_FLAG=0
    Y=IPRED+IPRED*ERR(1) ; a prediction
 ELSE
; Categorical data
    F_FLAG=1
; IF EXPP>40, then A>1.0d+17, A/B=1, and Y=DV
    AA=EXP(EXPP)
    B=1+AA
    Y=DV*AA/B+(1-DV)/B      ; a likelihood
 ENDIF

; Although SAEM does not use Laplace method, this opption is required so NMTRAN can prepare for all methods
$EST METHOD=ITS INTER LAP NITER=0 NOABORT
$EST METHOD=SAEM INTER LAP AUTO=1 NITER=300 PRINT=10
; Because of categorical data, which can make conditional density highly non-normal, select a t-distribution
; with 4 degrees of freedom for importance sampling proposal density
$EST METHOD=IMP EONLY=1 NITER=5 ISAMPLE=1000 PRINT=1 DF=4 IACCEPT=1.0

$COV UNCONDITIONAL PRINT=E MATRIX=R SIGL=10
$TABLE ID DOSE WT TIME TYPE DV AA NOPRINT FILE=wexample10_saem.tab

NM-TRAN MESSAGES
 WARNINGS AND ERRORS (IF ANY) FOR PROBLEM    1
 (WARNING  2) NM-TRAN INFERS THAT THE DATA ARE POPULATION.
 (WARNING  3) THERE MAY BE AN ERROR IN THE ABBREVIATED CODE. THE FOLLOWING
 ONE OR MORE RANDOM VARIABLES ARE DEFINED WITH "IF" STATEMENTS THAT DO NOT
 PROVIDE DEFINITIONS FOR BOTH THE "THEN" AND "ELSE" CASES. IF ALL
 CONDITIONS FAIL, THE VALUES OF THESE VARIABLES WILL BE ZERO.
   AA B
 (WARNING  87) WITH "LAPLACIAN" AND "INTERACTION", "NUMERICAL" AND "SLOW"
 ARE ALSO REQUIRED ON $ESTIM RECORD, AND "SLOW" IS REQUIRED ON $COV
 RECORD. NM-TRAN HAS SUPPLIED THESE OPTIONS.
 (WARNING  87) WITH "LAPLACIAN" AND "INTERACTION", "NUMERICAL" AND "SLOW"
 ARE ALSO REQUIRED ON $ESTIM RECORD, AND "SLOW" IS REQUIRED ON $COV
 RECORD. NM-TRAN HAS SUPPLIED THESE OPTIONS.
 (WARNING  87) WITH "LAPLACIAN" AND "INTERACTION", "NUMERICAL" AND "SLOW"
 ARE ALSO REQUIRED ON $ESTIM RECORD, AND "SLOW" IS REQUIRED ON $COV
 RECORD. NM-TRAN HAS SUPPLIED THESE OPTIONS.

1NONLINEAR MIXED EFFECTS MODEL PROGRAM (NONMEM) VERSION 7.4.3
 ORIGINALLY DEVELOPED BY STUART BEAL, LEWIS SHEINER, AND ALISON BOECKMANN
 CURRENT DEVELOPERS ARE ROBERT BAUER, ICON DEVELOPMENT SOLUTIONS,
 AND ALISON BOECKMANN. IMPLEMENTATION, EFFICIENCY, AND STANDARDIZATION
 PERFORMED BY NOUS INFOSYSTEMS.
 PROBLEM NO.:         1
 wexample10 (from F_FLAG04est2a.ctl)
 TOT. NO. OF OBS RECS:     4320
 TOT. NO. OF INDIVIDUALS:      288
 ONE COMPARTMENT MODEL WITH FIRST-ORDER ABSORPTION (ADVAN2)
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 #TBLN:      1
 #METH: Iterative Two Stage
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
 #TERM:
 OPTIMIZATION WAS NOT TESTED FOR CONVERGENCE

 ETABAR IS THE ARITHMETIC MEAN OF THE ETA-ESTIMATES,
 AND THE P-VALUE IS GIVEN FOR THE NULL HYPOTHESIS THAT THE TRUE MEAN IS 0.

 ETABAR:        -2.9656E-01  1.0461E+00  1.7074E+00
 SE:             1.6002E-02  1.5740E-02  1.5956E-02
 N:                     288         288         288

 P VAL.:         1.1936E-76  0.0000E+00  0.0000E+00

 ETASHRINKSD(%)  5.0335E+01  5.1146E+01  5.0476E+01
 ETASHRINKVR(%)  7.5334E+01  7.6133E+01  7.5473E+01
 EBVSHRINKSD(%)  4.4118E+01  3.0978E+00  2.1545E+00
 EBVSHRINKVR(%)  6.8772E+01  6.0996E+00  4.2626E+00
 EPSSHRINKSD(%)  5.2933E+01
 EPSSHRINKVR(%)  7.7847E+01


 TOTAL DATA POINTS NORMALLY DISTRIBUTED (N):         2880
 N*LOG(2PI) CONSTANT TO OBJECTIVE FUNCTION:    5293.08595125891
 OBJECTIVE FUNCTION VALUE WITHOUT CONSTANT:    16156.8362013043
 OBJECTIVE FUNCTION VALUE WITH CONSTANT:       21449.9221525632
 REPORTED OBJECTIVE FUNCTION DOES NOT CONTAIN CONSTANT

 TOTAL EFFECTIVE ETAS (NIND*NETA):                           864


 #TERE:
 Elapsed estimation  time in seconds:     0.83
 Elapsed covariance  time in seconds:     0.16

 ********************                               ITERATIVE TWO STAGE                              ********************
 #OBJT:**************                        FINAL VALUE OF OBJECTIVE FUNCTION                       ********************
 #OBJV:********************************************    16156.836       **************************************************

 ********************                               ITERATIVE TWO STAGE                              ********************
 ********************                             FINAL PARAMETER ESTIMATE                           ********************

 THETA - VECTOR OF FIXED EFFECTS PARAMETERS   *********
         TH 1      TH 2      TH 3      TH 4      TH 5
         1.60E+00  2.30E+00  7.00E-01  1.00E-01  1.00E-01

 OMEGA - COV MATRIX FOR RANDOM EFFECTS - ETAS  ********
         ETA1      ETA2      ETA3
 ETA1
+        3.00E-01
 ETA2
+        1.00E-02  3.00E-01
 ETA3
+        1.00E-02  1.00E-02  3.00E-01

 SIGMA - COV MATRIX FOR RANDOM EFFECTS - EPSILONS  ****
         EPS1
 EPS1
+        1.00E-01

 OMEGA - CORR MATRIX FOR RANDOM EFFECTS - ETAS  *******
         ETA1      ETA2      ETA3
 ETA1
+        5.48E-01
 ETA2
+        3.33E-02  5.48E-01
 ETA3
+        3.33E-02  3.33E-02  5.48E-01

 SIGMA - CORR MATRIX FOR RANDOM EFFECTS - EPSILONS  ***
         EPS1
 EPS1
+        3.16E-01

 ********************                               ITERATIVE TWO STAGE                              ********************
 ********************                          STANDARD ERROR OF ESTIMATE (S)                        ********************

 THETA - VECTOR OF FIXED EFFECTS PARAMETERS   *********
         TH 1      TH 2      TH 3      TH 4      TH 5
         4.01E-01  5.29E-01  3.11E-01  1.01E-01  7.36E-03

 OMEGA - COV MATRIX FOR RANDOM EFFECTS - ETAS  ********
         ETA1      ETA2      ETA3
 ETA1
+        8.89E-02
 ETA2
+        9.02E-02  1.18E-01
 ETA3
+        7.30E-02  9.18E-02  8.95E-02

 SIGMA - COV MATRIX FOR RANDOM EFFECTS - EPSILONS  ****
         EPS1
 EPS1
+        1.43E-02

 OMEGA - CORR MATRIX FOR RANDOM EFFECTS - ETAS  *******
         ETA1      ETA2      ETA3
 ETA1
+        8.12E-02
 ETA2
+        2.98E-01  1.08E-01
 ETA3
+        2.45E-01  3.13E-01  8.17E-02

 SIGMA - CORR MATRIX FOR RANDOM EFFECTS - EPSILONS  ***
         EPS1
 EPS1
+        2.26E-02

 ********************                               ITERATIVE TWO STAGE                              ********************
 ********************                        COVARIANCE MATRIX OF ESTIMATE (S)                       ********************

            TH 1      TH 2      TH 3      TH 4      TH 5      OM11      OM12      OM13      OM22      OM23      OM33      SG11
 TH 1
+        1.61E-01
 TH 2
+        5.37E-02  2.80E-01
 TH 3
+        9.05E-03 -1.27E-01  9.64E-02
 TH 4
+        5.05E-03 -3.72E-03  4.78E-03  1.02E-02
 TH 5
+       -2.24E-04 -1.87E-04  4.85E-05 -5.10E-04  5.41E-05
 OM11
+        8.72E-03 -6.82E-05  5.09E-03  1.16E-03 -5.26E-05  7.90E-03
 OM12
+       -8.20E-03  1.78E-02 -9.77E-03 -1.23E-03  5.35E-05  1.92E-03  8.13E-03
 OM13
+       -2.04E-02 -1.96E-02  7.11E-03  2.01E-04  1.45E-06 -4.50E-04 -2.87E-03  5.33E-03
 OM22
+       -7.04E-03 -1.66E-02  1.44E-02  1.28E-04  7.40E-06  8.21E-04  2.83E-03 -2.55E-04  1.40E-02
 OM23
+       -6.83E-03 -3.49E-02  1.15E-02  1.17E-04  6.10E-05 -5.41E-06 -3.03E-03  3.00E-03 -4.81E-03  8.43E-03
 OM33
+       -2.62E-03  3.88E-02 -2.36E-02 -7.81E-04 -5.31E-05 -1.27E-03  2.98E-03 -1.98E-03  3.27E-04 -6.45E-03  8.01E-03
 SG11
+        1.83E-04  1.30E-03  1.44E-03  4.69E-05  3.36E-06  8.25E-05 -3.13E-05  1.32E-04 -6.37E-05 -1.66E-04 -1.77E-04  2.04E-04

 ********************                               ITERATIVE TWO STAGE                              ********************
 ********************                        CORRELATION MATRIX OF ESTIMATE (S)                      ********************

            TH 1      TH 2      TH 3      TH 4      TH 5      OM11      OM12      OM13      OM22      OM23      OM33      SG11
 TH 1
+        4.01E-01
 TH 2
+        2.53E-01  5.29E-01
 TH 3
+        7.28E-02 -7.73E-01  3.11E-01
 TH 4
+        1.25E-01 -6.96E-02  1.52E-01  1.01E-01
 TH 5
+       -7.60E-02 -4.81E-02  2.12E-02 -6.87E-01  7.36E-03
 OM11
+        2.45E-01 -1.45E-03  1.85E-01  1.29E-01 -8.03E-02  8.89E-02
 OM12
+       -2.27E-01  3.73E-01 -3.49E-01 -1.35E-01  8.07E-02  2.40E-01  9.02E-02
 OM13
+       -6.98E-01 -5.06E-01  3.14E-01  2.73E-02  2.69E-03 -6.93E-02 -4.36E-01  7.30E-02
 OM22
+       -1.49E-01 -2.66E-01  3.93E-01  1.08E-02  8.51E-03  7.81E-02  2.66E-01 -2.96E-02  1.18E-01
 OM23
+       -1.86E-01 -7.18E-01  4.02E-01  1.26E-02  9.02E-02 -6.62E-04 -3.66E-01  4.47E-01 -4.43E-01  9.18E-02
 OM33
+       -7.30E-02  8.18E-01 -8.49E-01 -8.64E-02 -8.07E-02 -1.60E-01  3.69E-01 -3.03E-01  3.09E-02 -7.84E-01  8.95E-02
 SG11
+        3.21E-02  1.73E-01  3.24E-01  3.26E-02  3.20E-02  6.50E-02 -2.43E-02  1.26E-01 -3.78E-02 -1.27E-01 -1.39E-01  1.43E-02
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
 ********************                               ITERATIVE TWO STAGE                              ********************
 ********************                    EIGENVALUES OF COR MATRIX OF ESTIMATE (S)                   ********************

             1         2         3         4         5         6         7         8         9        10        11        12
         2.72E-04  8.49E-03  1.46E-02  4.99E-02  2.94E-01  6.17E-01  1.02E+00  1.17E+00  1.53E+00  1.64E+00  1.91E+00  3.74E+00
 #TBLN:      2
 #METH: Stochastic Approximation Expectation-Maximization (No Prior)
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
 #TERM:
 STOCHASTIC PORTION WAS COMPLETED
 REDUCED STOCHASTIC PORTION WAS COMPLETED

 ETABAR IS THE ARITHMETIC MEAN OF THE ETA-ESTIMATES,
 AND THE P-VALUE IS GIVEN FOR THE NULL HYPOTHESIS THAT THE TRUE MEAN IS 0.

 ETABAR:         1.5027E-05  1.8180E-06  2.3704E-06
 SE:             1.4836E-02  1.5634E-02  1.6929E-02
 N:                     288         288         288

 P VAL.:         9.9919E-01  9.9991E-01  9.9989E-01

 ETASHRINKSD(%)  1.7182E+01  2.8397E+00  1.6315E+00
 ETASHRINKVR(%)  3.1412E+01  5.5988E+00  3.2364E+00
 EBVSHRINKSD(%)  1.7174E+01  2.8410E+00  1.6331E+00
 EBVSHRINKVR(%)  3.1398E+01  5.6012E+00  3.2395E+00
 EPSSHRINKSD(%)  1.3538E+01
 EPSSHRINKVR(%)  2.5243E+01


 TOTAL DATA POINTS NORMALLY DISTRIBUTED (N):         2880
 N*LOG(2PI) CONSTANT TO OBJECTIVE FUNCTION:    5293.08595125891
 OBJECTIVE FUNCTION VALUE WITHOUT CONSTANT:    5485.93481243597
 OBJECTIVE FUNCTION VALUE WITH CONSTANT:       10779.0207636949
 REPORTED OBJECTIVE FUNCTION DOES NOT CONTAIN CONSTANT

 TOTAL EFFECTIVE ETAS (NIND*NETA):                           864
 NIND*NETA*LOG(2PI) CONSTANT TO OBJECTIVE FUNCTION:    1587.92578537767
 OBJECTIVE FUNCTION VALUE WITHOUT CONSTANT:    5485.93481243597
 OBJECTIVE FUNCTION VALUE WITH CONSTANT:       7073.86059781365
 REPORTED OBJECTIVE FUNCTION DOES NOT CONTAIN CONSTANT


 #TERE:
 Elapsed estimation  time in seconds:    91.56
 Elapsed covariance  time in seconds:     0.13

 ********************           STOCHASTIC APPROXIMATION EXPECTATION-MAXIMIZATION (NO PRIOR)         ********************
 #OBJT:**************                        FINAL VALUE OF LIKELIHOOD FUNCTION                      ********************
 #OBJV:********************************************     5485.935       **************************************************

 ********************           STOCHASTIC APPROXIMATION EXPECTATION-MAXIMIZATION (NO PRIOR)         ********************
 ********************                             FINAL PARAMETER ESTIMATE                           ********************

 THETA - VECTOR OF FIXED EFFECTS PARAMETERS   *********
         TH 1      TH 2      TH 3      TH 4      TH 5
         1.12E+00  3.39E+00  2.44E+00 -6.48E-01  8.08E-02

 OMEGA - COV MATRIX FOR RANDOM EFFECTS - ETAS  ********
         ETA1      ETA2      ETA3
 ETA1
+        9.27E-02
 ETA2
+        3.47E-03  7.48E-02
 ETA3
+        3.74E-02  2.96E-02  8.56E-02

 SIGMA - COV MATRIX FOR RANDOM EFFECTS - EPSILONS  ****
         EPS1
 EPS1
+        2.28E-02

 OMEGA - CORR MATRIX FOR RANDOM EFFECTS - ETAS  *******
         ETA1      ETA2      ETA3
 ETA1
+        3.05E-01
 ETA2
+        4.16E-02  2.74E-01
 ETA3
+        4.20E-01  3.70E-01  2.93E-01

 SIGMA - CORR MATRIX FOR RANDOM EFFECTS - EPSILONS  ***
         EPS1
 EPS1
+        1.51E-01

 ********************           STOCHASTIC APPROXIMATION EXPECTATION-MAXIMIZATION (NO PRIOR)         ********************
 ********************                          STANDARD ERROR OF ESTIMATE (S)                        ********************

 THETA - VECTOR OF FIXED EFFECTS PARAMETERS   *********
         TH 1      TH 2      TH 3      TH 4      TH 5
         2.42E-02  1.67E-02  1.76E-02  9.98E-02  7.21E-03

 OMEGA - COV MATRIX FOR RANDOM EFFECTS - ETAS  ********
         ETA1      ETA2      ETA3
 ETA1
+        1.09E-02
 ETA2
+        6.66E-03  6.44E-03
 ETA3
+        7.55E-03  5.18E-03  7.26E-03

 SIGMA - COV MATRIX FOR RANDOM EFFECTS - EPSILONS  ****
         EPS1
 EPS1
+        7.78E-04

 OMEGA - CORR MATRIX FOR RANDOM EFFECTS - ETAS  *******
         ETA1      ETA2      ETA3
 ETA1
+        1.79E-02
 ETA2
+        7.94E-02  1.18E-02
 ETA3
+        6.18E-02  5.34E-02  1.24E-02

 SIGMA - CORR MATRIX FOR RANDOM EFFECTS - EPSILONS  ***
         EPS1
 EPS1
+        2.58E-03

 ********************           STOCHASTIC APPROXIMATION EXPECTATION-MAXIMIZATION (NO PRIOR)         ********************
 ********************                        COVARIANCE MATRIX OF ESTIMATE (S)                       ********************

            TH 1      TH 2      TH 3      TH 4      TH 5      OM11      OM12      OM13      OM22      OM23      OM33      SG11
 TH 1
+        5.84E-04
 TH 2
+        3.38E-05  2.80E-04
 TH 3
+        1.39E-04  1.18E-04  3.11E-04
 TH 4
+       -3.07E-05 -9.30E-05 -1.02E-04  9.96E-03
 TH 5
+        8.69E-06  6.71E-06  5.97E-06 -4.94E-04  5.20E-05
 OM11
+        8.49E-05  3.76E-06 -3.00E-06  7.61E-05 -2.82E-06  1.19E-04
 OM12
+        1.56E-05  5.72E-06  7.02E-06 -9.78E-05  4.61E-06  1.35E-05  4.43E-05
 OM13
+        2.42E-05  5.08E-06  2.27E-06 -1.96E-05  7.57E-07  6.31E-05  1.99E-05  5.70E-05
 OM22
+        7.87E-06 -2.48E-06  1.05E-06  3.75E-06  1.71E-06  6.42E-06  4.13E-06  5.05E-06  4.15E-05
 OM23
+        5.70E-06  1.28E-06  2.25E-06 -2.93E-05  3.39E-06  5.51E-06  1.55E-05  9.81E-06  1.48E-05  2.68E-05
 OM33
+        3.77E-06  3.34E-06  5.12E-06 -5.94E-05  1.48E-06  7.47E-06  1.26E-05  2.11E-05  3.72E-06  1.78E-05  5.27E-05
 SG11
+        6.76E-07  1.03E-06  2.47E-07  7.82E-07  3.05E-07  4.51E-08 -3.20E-07  1.91E-07 -6.50E-07 -6.71E-07  3.36E-07  6.06E-07

 ********************           STOCHASTIC APPROXIMATION EXPECTATION-MAXIMIZATION (NO PRIOR)         ********************
 ********************                        CORRELATION MATRIX OF ESTIMATE (S)                      ********************

            TH 1      TH 2      TH 3      TH 4      TH 5      OM11      OM12      OM13      OM22      OM23      OM33      SG11
 TH 1
+        2.42E-02
 TH 2
+        8.35E-02  1.67E-02
 TH 3
+        3.25E-01  3.98E-01  1.76E-02
 TH 4
+       -1.27E-02 -5.57E-02 -5.81E-02  9.98E-02
 TH 5
+        4.99E-02  5.56E-02  4.69E-02 -6.87E-01  7.21E-03
 OM11
+        3.23E-01  2.06E-02 -1.56E-02  7.01E-02 -3.59E-02  1.09E-02
 OM12
+        9.72E-02  5.13E-02  5.97E-02 -1.47E-01  9.60E-02  1.86E-01  6.66E-03
 OM13
+        1.33E-01  4.02E-02  1.70E-02 -2.60E-02  1.39E-02  7.68E-01  3.97E-01  7.55E-03
 OM22
+        5.06E-02 -2.30E-02  9.24E-03  5.83E-03  3.69E-02  9.15E-02  9.63E-02  1.04E-01  6.44E-03
 OM23
+        4.56E-02  1.48E-02  2.47E-02 -5.67E-02  9.08E-02  9.77E-02  4.49E-01  2.51E-01  4.44E-01  5.18E-03
 OM33
+        2.15E-02  2.75E-02  4.00E-02 -8.19E-02  2.83E-02  9.44E-02  2.60E-01  3.86E-01  7.96E-02  4.74E-01  7.26E-03
 SG11
+        3.59E-02  7.90E-02  1.80E-02  1.01E-02  5.44E-02  5.32E-03 -6.16E-02  3.26E-02 -1.30E-01 -1.66E-01  5.95E-02  7.78E-04
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
 ********************           STOCHASTIC APPROXIMATION EXPECTATION-MAXIMIZATION (NO PRIOR)         ********************
 ********************                    EIGENVALUES OF COR MATRIX OF ESTIMATE (S)                   ********************

             1         2         3         4         5         6         7         8         9        10        11        12
         1.34E-01  2.75E-01  3.53E-01  5.10E-01  6.96E-01  8.14E-01  8.95E-01  1.10E+00  1.33E+00  1.58E+00  1.75E+00  2.56E+00
 #TBLN:      3
 #METH: Objective Function Evaluation by Importance Sampling (No Prior)
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
 #TERM:
 EXPECTATION ONLY PROCESS COMPLETED

 ETABAR IS THE ARITHMETIC MEAN OF THE ETA-ESTIMATES,
 AND THE P-VALUE IS GIVEN FOR THE NULL HYPOTHESIS THAT THE TRUE MEAN IS 0.

 ETABAR:         8.3154E-04 -9.3510E-05 -9.0099E-05
 SE:             1.4807E-02  1.5613E-02  1.6923E-02
 N:                     288         288         288

 P VAL.:         9.5522E-01  9.9522E-01  9.9575E-01

 ETASHRINKSD(%)  1.7342E+01  2.9675E+00  1.6644E+00
 ETASHRINKVR(%)  3.1676E+01  5.8469E+00  3.3011E+00
 EBVSHRINKSD(%)  1.7354E+01  2.8540E+00  1.6420E+00
 EBVSHRINKVR(%)  3.1697E+01  5.6265E+00  3.2570E+00
 EPSSHRINKSD(%)  1.3500E+01
 EPSSHRINKVR(%)  2.5178E+01


 TOTAL DATA POINTS NORMALLY DISTRIBUTED (N):         2880
 N*LOG(2PI) CONSTANT TO OBJECTIVE FUNCTION:    5293.08595125891
 OBJECTIVE FUNCTION VALUE WITHOUT CONSTANT:    10022.2416102336
 OBJECTIVE FUNCTION VALUE WITH CONSTANT:       15315.3275614925
 REPORTED OBJECTIVE FUNCTION DOES NOT CONTAIN CONSTANT

 TOTAL EFFECTIVE ETAS (NIND*NETA):                           864


 #TERE:
 Elapsed estimation  time in seconds:    14.51
 Elapsed covariance  time in seconds:    71.88

 ********************         OBJECTIVE FUNCTION EVALUATION BY IMPORTANCE SAMPLING (NO PRIOR)        ********************
 #OBJT:**************                        FINAL VALUE OF OBJECTIVE FUNCTION                       ********************
 #OBJV:********************************************    10022.242       **************************************************

 ********************         OBJECTIVE FUNCTION EVALUATION BY IMPORTANCE SAMPLING (NO PRIOR)        ********************
 ********************                             FINAL PARAMETER ESTIMATE                           ********************

 THETA - VECTOR OF FIXED EFFECTS PARAMETERS   *********
         TH 1      TH 2      TH 3      TH 4      TH 5
         1.12E+00  3.39E+00  2.44E+00 -6.48E-01  8.08E-02

 OMEGA - COV MATRIX FOR RANDOM EFFECTS - ETAS  ********
         ETA1      ETA2      ETA3
 ETA1
+        9.27E-02
 ETA2
+        3.47E-03  7.48E-02
 ETA3
+        3.74E-02  2.96E-02  8.56E-02

 SIGMA - COV MATRIX FOR RANDOM EFFECTS - EPSILONS  ****
         EPS1
 EPS1
+        2.28E-02

 OMEGA - CORR MATRIX FOR RANDOM EFFECTS - ETAS  *******
         ETA1      ETA2      ETA3
 ETA1
+        3.05E-01
 ETA2
+        4.16E-02  2.74E-01
 ETA3
+        4.20E-01  3.70E-01  2.93E-01

 SIGMA - CORR MATRIX FOR RANDOM EFFECTS - EPSILONS  ***
         EPS1
 EPS1
+        1.51E-01

 ********************         OBJECTIVE FUNCTION EVALUATION BY IMPORTANCE SAMPLING (NO PRIOR)        ********************
 ********************                          STANDARD ERROR OF ESTIMATE (R)                        ********************

 THETA - VECTOR OF FIXED EFFECTS PARAMETERS   *********
         TH 1      TH 2      TH 3      TH 4      TH 5
         2.24E-02  1.66E-02  1.75E-02  9.50E-02  6.17E-03

 OMEGA - COV MATRIX FOR RANDOM EFFECTS - ETAS  ********
         ETA1      ETA2      ETA3
 ETA1
+        1.17E-02
 ETA2
+        6.27E-03  6.65E-03
 ETA3
+        7.02E-03  5.34E-03  7.39E-03

 SIGMA - COV MATRIX FOR RANDOM EFFECTS - EPSILONS  ****
         EPS1
 EPS1
+        7.19E-04

 OMEGA - CORR MATRIX FOR RANDOM EFFECTS - ETAS  *******
         ETA1      ETA2      ETA3
 ETA1
+        1.92E-02
 ETA2
+        7.49E-02  1.22E-02
 ETA3
+        6.33E-02  5.30E-02  1.26E-02

 SIGMA - CORR MATRIX FOR RANDOM EFFECTS - EPSILONS  ***
         EPS1
 EPS1
+        2.38E-03

 ********************         OBJECTIVE FUNCTION EVALUATION BY IMPORTANCE SAMPLING (NO PRIOR)        ********************
 ********************                        COVARIANCE MATRIX OF ESTIMATE (R)                       ********************

            TH 1      TH 2      TH 3      TH 4      TH 5      OM11      OM12      OM13      OM22      OM23      OM33      SG11
 TH 1
+        5.02E-04
 TH 2
+        3.00E-05  2.76E-04
 TH 3
+        1.39E-04  1.16E-04  3.08E-04
 TH 4
+        2.03E-06 -1.19E-06 -5.97E-07  9.03E-03
 TH 5
+        1.73E-06  1.05E-06  8.65E-07 -3.61E-04  3.81E-05
 OM11
+        3.91E-05 -1.07E-06 -9.47E-07  6.35E-07  3.86E-08  1.37E-04
 OM12
+        4.05E-06  4.21E-07  5.05E-07 -6.35E-08  1.83E-08  6.87E-06  3.93E-05
 OM13
+        6.47E-06 -1.34E-06 -1.11E-06  1.24E-06 -1.39E-07  3.98E-05  1.79E-05  4.93E-05
 OM22
+        2.23E-06  3.68E-07 -1.44E-08 -8.41E-07  1.84E-07  7.31E-07  4.54E-06  2.04E-06  4.42E-05
 OM23
+       -4.91E-07 -2.49E-07 -6.21E-09 -1.01E-07  5.09E-08  2.30E-06  1.19E-05  7.06E-06  1.86E-05  2.85E-05
 OM33
+       -1.59E-06  9.29E-08  2.70E-07  1.59E-07 -4.72E-08  1.06E-05  9.22E-06  2.42E-05  7.86E-06  2.05E-05  5.46E-05
 SG11
+        2.36E-07  4.34E-07  3.73E-07 -6.48E-10  3.00E-08 -7.26E-07 -7.90E-08 -3.64E-08 -9.05E-08 -7.79E-08 -5.44E-08  5.17E-07

 ********************         OBJECTIVE FUNCTION EVALUATION BY IMPORTANCE SAMPLING (NO PRIOR)        ********************
 ********************                        CORRELATION MATRIX OF ESTIMATE (R)                      ********************

            TH 1      TH 2      TH 3      TH 4      TH 5      OM11      OM12      OM13      OM22      OM23      OM33      SG11
 TH 1
+        2.24E-02
 TH 2
+        8.05E-02  1.66E-02
 TH 3
+        3.55E-01  3.96E-01  1.75E-02
 TH 4
+        9.54E-04 -7.52E-04 -3.58E-04  9.50E-02
 TH 5
+        1.25E-02  1.02E-02  7.99E-03 -6.17E-01  6.17E-03
 OM11
+        1.49E-01 -5.48E-03 -4.61E-03  5.71E-04  5.34E-04  1.17E-02
 OM12
+        2.88E-02  4.04E-03  4.59E-03 -1.06E-04  4.72E-04  9.34E-02  6.27E-03
 OM13
+        4.11E-02 -1.14E-02 -9.01E-03  1.86E-03 -3.20E-03  4.84E-01  4.05E-01  7.02E-03
 OM22
+        1.50E-02  3.32E-03 -1.24E-04 -1.33E-03  4.49E-03  9.39E-03  1.09E-01  4.36E-02  6.65E-03
 OM23
+       -4.11E-03 -2.80E-03 -6.63E-05 -1.99E-04  1.54E-03  3.67E-02  3.56E-01  1.88E-01  5.23E-01  5.34E-03
 OM33
+       -9.64E-03  7.57E-04  2.08E-03  2.27E-04 -1.04E-03  1.22E-01  1.99E-01  4.66E-01  1.60E-01  5.21E-01  7.39E-03
 SG11
+        1.46E-02  3.63E-02  2.96E-02 -9.48E-06  6.77E-03 -8.61E-02 -1.75E-02 -7.21E-03 -1.89E-02 -2.03E-02 -1.02E-02  7.19E-04
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
 ********************         OBJECTIVE FUNCTION EVALUATION BY IMPORTANCE SAMPLING (NO PRIOR)        ********************
 ********************                    EIGENVALUES OF COR MATRIX OF ESTIMATE (R)                   ********************

             1         2         3         4         5         6         7         8         9        10        11        12
         2.32E-01  3.83E-01  4.19E-01  5.01E-01  7.64E-01  8.35E-01  9.34E-01  1.02E+00  1.39E+00  1.58E+00  1.62E+00  2.32E+00
 Elapsed postprocess time in seconds:     0.05
 Elapsed finaloutput time in seconds:     0.37
 #CPUT: Total CPU Time in Seconds,      171.211
